l1 := 0.375
w := 0.1
R := 0.15
μ := 0.998
Ukm := 10/6
mg := 2000
h := 0.25
fi := (π*45)/180
N3 := 1/6*mg = 333.333
U := Ukm*1000/3600 = 0.462963
N1 := 2*N3 = 666.667
l3 := 1 - R = 0.85
l2 := (l1 + R)*cos(fi) = 0.371231
m1 := 9.7
Wlinear := U/R = 3.08642
m1g := m1*9.8 = 95.06
Mp := (m1g*l1*cos(fi))/2 + (N1*l1*cos(fi))/2 + μ*N1*(R + (l1*cos(fi)/2)*sin(fi)) = 263.167
t := 5
ε := Wlinear/t = 0.617284
m_wheel := 1
Np := Mp*w = 26.3167
n2 := 0.42
Md_linear := 0.5*m_wheel*R^2*ε + μ*N3*R = 49.9069
n := 0.35
Nd_linear := Md_linear*Wlinear = 154.034
Npreal := 1.5*Np/n = 112.786
Ndreal_linear := 1.2*Nd_linear/n2 = 440.097
Md := ((μ*N3*h + N3*l3 + μ*N1*h + N1*l2 + mg*l2 + Mp)/3) = 595.316
Nd_all_linear := 6*Ndreal_linear = 2640.58
h2 := 0.4
Rp := 1/4*mg = 500
Nd := Md*w = 59.5316
Mp2 := μ*Rp*h2 + mg*0.5*l1*cos(fi) = 464.765
Ndreal := 1.5*Nd/n = 255.136
Np2 := Mp2*w = 46.4765
Ndreal_all := 6*Ndreal = 1530.81
Np2real := 1.5*Np2/n = 199.185
w3 := 0.5
U3 := w3*R = 0.075
Ukm2 := (U3*3600)/1000 = 0.27
